# C-VV: type-pair matrix selection for cohesion generalized_adhesion with 2 atom types.
# Three isolated, non-integrated overlapping pairs: (1,1) (1,2) (2,2).
atom_style    granular
atom_modify   map array
boundary      f f f
newton        off
communicate   single vel yes
units         si
region        domain block -0.02 0.02 -0.01 0.01 -0.01 0.01 units box
create_box    2 domain
neighbor      0.0005 bin
neigh_modify  delay 0
timestep      1e-6
fix  m1 all property/global youngsModulus peratomtype 1.e7 1.e7
fix  m2 all property/global poissonsRatio peratomtype 0.3 0.3
fix  m3 all property/global coefficientRestitution peratomtypepair 2 0.5 0.5 0.5 0.5
fix  m4 all property/global coefficientFriction peratomtypepair 2 0.5 0.5 0.5 0.5
fix  m6 all property/global adhesionEnergy peratomtypepair 2 1.0e5 5.0e5 5.0e5 2.0e6
pair_style  gran model hertz tangential history cohesion generalized_adhesion
pair_coeff  * *
create_atoms  1 single -0.01099 0 0 units box
create_atoms  1 single -0.00901 0 0 units box
create_atoms  1 single -0.00099 0 0 units box
create_atoms  2 single  0.00099 0 0 units box
create_atoms  2 single  0.00901 0 0 units box
create_atoms  2 single  0.01099 0 0 units box
set atom * diameter 0.002 density 2500
variable f1 equal fx[1]
variable f3 equal fx[3]
variable f4 equal fx[4]
variable f5 equal fx[5]
thermo_style custom step v_f1 v_f3 v_f4 v_f5
thermo_modify format float %.12g
thermo 1
run 0
