#Simple chute wear test

atom_style    granular
atom_modify   map array
boundary      f f f
newton        off

communicate   single vel yes

units         si

region        domain block -0.5 0.1 -0.2 0.2 -0.4 0.15 units box
create_box    1 domain

neighbor      0.002 bin
neigh_modify  delay 0


#Material properties required for new pair styles

fix  m1 all property/global youngsModulus peratomtype 5.e6
fix  m2 all property/global poissonsRatio peratomtype 0.45
fix  m3 all property/global coefficientRestitution peratomtypepair 1 0.3
fix  m4 all property/global coefficientFriction peratomtypepair 1 0.5
fix  m5 all property/global k_finnie peratomtypepair 1 1.0

#New pair style
pair_style  gran model hertz tangential history #Hertzian without cohesion
pair_coeff  * *

timestep    0.00001

fix  gravi all gravity 9.81 vector 0.0 0.0 -1.0

#the chute
fix  cad all mesh/surface/stress file meshes/simple_chute.stl type 1 wear finnie
fix  inface all mesh/surface file meshes/insertion_face.stl type 1
fix  granwalls all wall/gran model hertz tangential history mesh n_meshes 1 meshes cad


#distributions for insertion
fix  pts1 all particletemplate/sphere 15485863 atom_type 1 density constant 2500 radius constant 0.0015
fix  pts2 all particletemplate/sphere 15485867 atom_type 1 density constant 2500 radius constant 0.0025
fix  pdd1 all particledistribution/discrete 32452843  2 pts1 0.3 pts2 0.7

#region and insertion
group  nve_group region domain
region bc cylinder z 0.0 0.0 0.015 0.05 0.12 units box

#particle insertion
fix    ins nve_group insert/stream seed 32452867 distributiontemplate pdd1 &
       nparticles 6000 massrate 0.1 insert_every 1000 overlapcheck yes all_in no vel constant 0.0 0.0 -1.0 &
       insertion_face inface

#apply nve integration to all particles that are inserted as single particles
fix    integr nve_group nve/sphere

#output settings, include total thermal energy
compute       1 all erotate/sphere
thermo_style  custom step atoms ke c_1 vol
thermo        1000
thermo_modify lost ignore norm no

#insert the first particles so that dump is not empty
run    1

# Output. Two paths, selected with the index variable use_hdf5:
#   use_hdf5 = 0 (default): plain-text particle dump post/dump*.chute (works on
#       every build, and is what ./postscript (lpp) expects).
#   use_hdf5 = 1 (recommended on HDF5 builds): parallel HDF5 particle and mesh
#       dumps with ParaView XDMF sidecars. Needs a build with parallel HDF5 and
#       -DLIGGGHTS_HDF5 (CMake: -DLIGGGHTS_ENABLE_HDF5=ON, or Make: hdf5mpi).
#       Select it on the command line:  lmp -var use_hdf5 1 -in in.chute_wear
#       Each /Step_<timestep> group holds id, position, velocity, force, omega
#       and radius; see doc/dump_hdf5.txt.
# Mesh stress/wear as VTK needs a VTK build (LAMMPS_VTK); on such a build add:
#   dump   dumpstress all mesh/gran/VTK 2000 post/mesh_*.vtk stress wear cad
variable use_hdf5 index 0
if "${use_hdf5} == 1" then &
   "dump   particles all hdf5 500 post/chute_particles.h5" &
   "dump   meshout all mesh/hdf5 1000 post/chute_mesh.h5 cad f sigma_n sigma_t wear" &
else &
   "dump   dmp all custom 2000 post/dump*.chute id type x y z ix iy iz vx vy vz fx fy fz omegax omegay omegaz radius"

#insert particles
# 6000 particles (mean mass 1.25e-4 kg, 0.75 kg in total) at 0.1 kg/s need
# about 7.5 s to be inserted. 1e6 steps at dt = 1e-5 s is 10 s, which leaves
# about 2.5 s for the last particles to flow down the chute. The original
# tutorial ran 1e5 steps (1 s), which inserts only about 13 % of them.
run    1000000 upto
unfix  ins
