# Acceptance guard of balance shift (LIGGGHTS modernization branch, balance2):
# three particle blocks on a 2x2x1 grid for which the per-dim shift cuts
# (marginal medians) are worse than the uniform cuts
variable mode index cmd
atom_style    granular
atom_modify   map array
boundary      f f f
newton        off
communicate   single vel yes
units         si
processors    2 2 1
region        dom block 0 0.1 0 0.1 0 0.01 units box
create_box    1 dom
neighbor      0.0005 bin
neigh_modify  delay 0
fix  m1 all property/global youngsModulus peratomtype 5.e6
fix  m2 all property/global poissonsRatio peratomtype 0.45
fix  m3 all property/global coefficientRestitution peratomtypepair 1 0.3
fix  m4 all property/global coefficientFriction peratomtypepair 1 0.5
pair_style  gran model hertz tangential history
pair_coeff  * *
timestep    0.00001
lattice       sc 0.002
region b1 block 0.0570 0.0770 0.0420 0.0620 0 0.01 units box
region b2 block 0.0338 0.0582 0.0078 0.0322 0 0.01 units box
region b3 block 0.0570 0.0710 0.0800 0.0940 0 0.01 units box
create_atoms 1 region b1
create_atoms 1 region b2
create_atoms 1 region b3
set group all density 2500 diameter 0.0019
fix integr all nve/sphere
thermo_style custom step atoms ke
run 0
include in.guard_${mode}
