# OpenMP regression deck: mesh wall with contact history and mesh stress/wear
# (from tests/cleanup/bitwise/chute_wear; LIGGGHTS modernization branch, omp agent)
variable nt  index 0
variable det index yes
if "${nt} > 0" then "package omp ${nt} deterministic ${det}"
#Simple chute wear test

atom_style    granular
atom_modify   map array
boundary      f f f
newton        off

communicate   single vel yes

units         si

region        domain block -0.5 0.1 -0.2 0.2 -0.4 0.15 units box
create_box    1 domain

neighbor      0.002 bin
neigh_modify  delay 0


#Material properties required for new pair styles

fix  m1 all property/global youngsModulus peratomtype 5.e6
fix  m2 all property/global poissonsRatio peratomtype 0.45
fix  m3 all property/global coefficientRestitution peratomtypepair 1 0.3
fix  m4 all property/global coefficientFriction peratomtypepair 1 0.5
fix  m5 all property/global k_finnie peratomtypepair 1 1.0

#New pair style
pair_style  gran model hertz tangential history #Hertzian without cohesion
pair_coeff  * *

timestep    0.00001

fix  gravi all gravity 9.81 vector 0.0 0.0 -1.0

#the chute
fix  cad all mesh/surface/stress file meshes/simple_chute.stl type 1 wear finnie
fix  inface all mesh/surface file meshes/insertion_face.stl type 1
fix  granwalls all wall/gran model hertz tangential history mesh n_meshes 1 meshes cad


#distributions for insertion
fix  pts1 all particletemplate/sphere 15485863 atom_type 1 density constant 2500 radius constant 0.0015
fix  pts2 all particletemplate/sphere 15485867 atom_type 1 density constant 2500 radius constant 0.0025
fix  pdd1 all particledistribution/discrete 32452843  2 pts1 0.3 pts2 0.7

#region and insertion
group  nve_group region domain
region bc cylinder z 0.0 0.0 0.015 0.05 0.12 units box

#particle insertion
fix    ins nve_group insert/stream seed 32452867 distributiontemplate pdd1 &
       nparticles 6000 massrate 0.1 insert_every 1000 overlapcheck yes all_in no vel constant 0.0 0.0 -1.0 &
       insertion_face inface

#apply nve integration to all particles that are inserted as single particles
fix    integr nve_group nve/sphere

#output settings, include total thermal energy
compute       1 all erotate/sphere
thermo_style  custom step atoms ke c_1 f_cad[1] f_cad[2] f_cad[3]
thermo_modify format float %.17g
thermo        1000
thermo_modify lost ignore norm no

#insert the first particles so that dump is not empty
run 1  # [audit: was 1]
# Parallel particle output. Requires a build with -DLIGGGHTS_HDF5 and parallel HDF5.
# The dump writes /Step_<timestep>/{id,position,velocity,radius} and a ParaView XDMF sidecar.
dump particles all custom 5000 post/dump*.txt id x y z vx vy vz fx fy fz tqx tqy tqz
dump_modify particles format "%d %.17g %.17g %.17g %.17g %.17g %.17g %.17g %.17g %.17g %.17g %.17g %.17g" sort id
# audit: mesh/hdf5 removed

# Mesh stress/wear output is VTK-specific in this example. Keep disabled when using
# the particle HDF5 dump unless the executable is also built with LAMMPS_VTK.
# dump   dumpstress all mesh/gran/VTK 200 post/mesh_*.vtk stress wear cad

#insert particles
run 20000
unfix  ins
