# props (A2, C-01/F-01): a v_-driven coefficientRestitution must reach the
# contact model inside ONE run. One sphere bounces between two primitive
# walls (no gravity); e = 0.9 for t < 0.05 s and 0.5 afterwards.
# Check: check_e_switch.py log  (impacts after the switch give e = 0.5 +- 1e-3)
atom_style    granular
atom_modify   map array
boundary      f f f
newton        off
communicate   single vel yes
units         si
region        reg block -0.01 0.01 -0.01 0.01 -0.001 0.021 units box
create_box    1 reg
neighbor      0.0005 bin
neigh_modify  delay 0
variable      e equal "(step*dt < 0.05) * 0.9 + (step*dt >= 0.05) * 0.5"
fix  m1 all property/global youngsModulus peratomtype 1e7
fix  m2 all property/global poissonsRatio peratomtype 0.3
fix  m3 all property/global coefficientRestitution peratomtypepair 1 v_e every 1
fix  m4 all property/global coefficientFriction peratomtypepair 1 0.0
pair_style gran model hertz tangential history
pair_coeff * *
timestep 1e-6
fix wz1 all wall/gran model hertz tangential history primitive type 1 zplane 0.0
fix wz2 all wall/gran model hertz tangential history primitive type 1 zplane 0.02
create_atoms 1 single 0.0 0.0 0.01
set atom 1 diameter 0.002 density 2500
velocity all set 0.0 0.0 -1.0
fix integr all nve/sphere
variable vz equal vz[1]
variable z equal z[1]
thermo_style custom step time v_e v_vz v_z
thermo_modify format float %.15g
thermo 100
run 150000
