# props (A2, V-05): youngsModulus doubles (v_) while a Hertz contact is open.
# With the registry refresh the change acts inside ONE run and injects exactly
# dU = (8/15) dY* sqrt(R*) delta^2.5 (documented policy: no rescaling of
# contact state). Check: check_stiffness_switch.py traj.txt
hard_particles yes
atom_style granular
atom_modify map array
boundary f f f
newton off
communicate single vel yes
units si
region domain block -0.01 0.01 -0.01 0.01 -0.01 0.01 units box
create_box 1 domain
neighbor 0.0005 bin
neigh_modify delay 0
variable Y equal 1e7*(1+(step>=500))
fix m1 all property/global youngsModulus peratomtype v_Y every 1
fix m2 all property/global poissonsRatio peratomtype 0.3
fix m3 all property/global coefficientRestitution peratomtypepair 1 1.0
fix m4 all property/global coefficientFriction peratomtypepair 1 0.0
pair_style gran model hertz tangential history
pair_coeff * *
timestep 2.038980865588239e-07
create_atoms 1 single -0.00100001 0 0 units box
create_atoms 1 single 0.00100001 0 0 units box
set atom * diameter 0.002 density 2500
set atom 1 vx 0.5
set atom 2 vx -0.5
fix integr all nve/sphere
variable x1 equal x[1]
variable x2 equal x[2]
variable v1 equal vx[1]
variable v2 equal vx[2]
variable st equal step
fix pr all print 1 "${st} ${x1} ${x2} ${v1} ${v2}" file traj.txt screen no
thermo 100000
run 1500
