# shared material block (both binaries); 2 atom types, identical properties
fix m1 all property/global youngsModulus peratomtype 5.e6 5.e6
fix m2 all property/global poissonsRatio peratomtype 0.45 0.45
variable cor equal 0.3+1e-9*step
fix m3 all property/global coefficientRestitution peratomtypepair 2 v_cor v_cor v_cor v_cor every ${pevery}
fix m4 all property/global coefficientFriction peratomtypepair 2 0.5 0.5 0.5 0.5
pair_style gran model hertz tangential history
pair_coeff * *
fix zwall1 all wall/gran model hertz tangential history primitive type 1 zplane 0.0
fix gravi all gravity 9.81 vector 0.0 0.0 -1.0
