# Superquadric chute (tests/sq, LIGGGHTS modernization branch, phase F, sq agent):
# sanitizer coverage deck. Superquadrics of two shapes (blocky, elongated) are
# inserted by insert/stream onto the chute_wear mesh (mesh wall with surface
# superquadric) and a primitive floor; pair contacts with hertz, tangential
# history and rolling epsd2. Needs an ENABLE_SQ build; run from a directory
# containing meshes/ (copied by run_all.sh). Variable nsteps (default 6000).
variable nsteps index 6000
atom_style    superquadric
atom_modify   map array
boundary      f f f
newton        off
communicate   single vel yes
units         si
region        domain block -0.5 0.1 -0.2 0.2 -0.4 0.15 units box
create_box    1 domain
neighbor      0.002 bin
neigh_modify  delay 0
fix  m1 all property/global youngsModulus peratomtype 5.e6
fix  m2 all property/global poissonsRatio peratomtype 0.45
fix  m3 all property/global coefficientRestitution peratomtypepair 1 0.3
fix  m4 all property/global coefficientFriction peratomtypepair 1 0.5
fix  m5 all property/global coefficientRollingFriction peratomtypepair 1 0.05
fix  m6 all property/global coefficientRollingViscousDamping peratomtypepair 1 0.0
pair_style  gran model hertz tangential history rolling_friction epsd2 surface superquadric
pair_coeff  * *
timestep    0.00001
fix  gravi all gravity 9.81 vector 0.0 0.0 -1.0
fix  cad all mesh/surface file meshes/simple_chute.stl type 1
fix  inface all mesh/surface file meshes/insertion_face.stl type 1
fix  granwalls all wall/gran model hertz tangential history rolling_friction epsd2 surface superquadric mesh n_meshes 1 meshes cad
fix  floor all wall/gran model hertz tangential history rolling_friction epsd2 surface superquadric primitive type 1 zplane -0.35
fix  pts1 all particletemplate/superquadric 15485863 atom_type 1 density constant 2500 shape constant 0.002 0.002 0.003 blockiness constant 4 4
fix  pts2 all particletemplate/superquadric 15485867 atom_type 1 density constant 2500 shape constant 0.0015 0.003 0.002 blockiness constant 3 6
fix  pdd1 all particledistribution/discrete 32452843 2 pts1 0.5 pts2 0.5
group  nve_group region domain
fix    ins nve_group insert/stream seed 32452867 distributiontemplate pdd1 &
       nparticles 300 massrate 0.5 insert_every 1000 overlapcheck yes all_in no vel constant 0.0 0.0 -1.0 &
       insertion_face inface
fix    integr nve_group nve/superquadric integration_scheme 1
compute       rke all erotate/superquadric
thermo_style  custom step atoms ke c_rke
thermo        1000
thermo_modify lost ignore norm no
run    ${nsteps}
